# OpenSim document version 20302
CMCTool jumpModel_CMC_test:
  model_file: CMC.osim
  replace_force_set: true
  force_set_files: CMC_Actuators.xml
  results_directory: CMC_Results
  output_precision: 8
  initial_time: 00000
  final_time: 0.7
  solve_for_equilibrium_for_auxiliary_states: true
  maximum_number_of_integrator_steps: 30000
  maximum_integrator_step_size: 1
  minimum_integrator_step_size: 0.00000001
  integrator_error_tolerance: 0.00001
  desired_kinematics_file: results/mycolo_states.sto
  task_set_file: CMC_Tasks.xml
  lowpass_cutoff_frequency: -1
  cmc_time_window: 0.01
  use_fast_optimization_target: true
  optimizer_algorithm: ipopt
  numerical_derivative_step_size: 0.0001
  optimization_convergence_tolerance: 0.0001
  optimizer_max_iterations: 2000
  optimizer_print_level: 3
  use_verbose_printing: true
  AnalysisSet Analyses:
    Kinematics: start_time=00000 end_time=0.7 step_interval=30 in_degrees=false coordinates=all
    Actuation: start_time=0000 end_time=0.7 step_interval=30 in_degrees=false
