# OpenSim document version 40000
AnalyzeTool 4linkModel:
  model_file: results/base3springs.osim
  replace_force_set: false
  results_directory: Analyzes
  output_precision: 8
  initial_time: 0
  final_time: 1.9
  solve_for_equilibrium_for_auxiliary_states: false
  maximum_number_of_integrator_steps: 20000
  maximum_integrator_step_size: 1
  minimum_integrator_step_size: 1e-8
  integrator_error_tolerance: 1e-5
  states_file: results/traj20.0.0.sto
  lowpass_cutoff_frequency_for_coordinates: -1
  AnalysisSet Analyses:
    Kinematics: start_time=0 end_time=1.9 step_interval=1 in_degrees=true
    BodyKinematics: start_time=0 end_time=1.9 step_interval=1 in_degrees=true bodies=all
        express_results_in_body_local_frame=false
    PointKinematics: start_time=0 end_time=1.9 step_interval=1 in_degrees=true body_name=ground
        relative_to_body_name=none point_name=NONAME point=(0 0 0)
    JointReaction: start_time=0 end_time=1.9 step_interval=1 in_degrees=true joint_names=ALL apply_on_bodies=child
        express_in_frame=ground
    ForceReporter: start_time=0 end_time=1.9 step_interval=1 in_degrees=true include_constraint_forces=false
    StatesReporter: start_time=0 end_time=1.9 step_interval=1 in_degrees=true
    OutputReporter: output_paths=(am|tou am|qfac am|act am|power am|opt am|ex km|tou km|qfac km|act km|power km|opt km|ex hm|tou hm|qfac hm|act hm|power hm|opt hm|ex ap|tou ap|qfac ap|act ap|power ap|opt ap|ex kp|tou kp|qfac kp|act kp|power kp|opt kp|ex hp|tou hp|qfac hp|act hp|power hp|opt hp|ex)
        start_time=0 end_time=1.9 step_interval=1 in_degrees=true
  ControllerSet Controllers:
    ControlSetController: controls_file=results/traj20.0.0.sto
