# OpenSim document version 40000
Model 4linkModel:
  gravity: 0 -9.81 0
  credits: barak ostraich
  PhysicalOffsetFrame Cyl1_frame: socket_parent=/bodyset/foot translation=(0 0.1042 0) [meters]
    Cylinder Cyl1_frame_geom_1: radius=0.005 half_height=0.1042
    Cylinder Cyl1_frame_geom_2: radius=0.04 half_height=0.025
  PhysicalOffsetFrame Cyl2_frame: socket_parent=/bodyset/shank translation=(0 0.2091 0)
    Cylinder Cyl2_frame_geom_1: radius=0.005 half_height=0.2091
    Cylinder Cyl2_frame_geom_2: radius=0.04 half_height=0.025
  PhysicalOffsetFrame Cyl3_frame: socket_parent=/bodyset/thigh translation=(0 0.20825 0)
    Cylinder Cyl3_frame_geom_1: radius=0.005 half_height=0.20825
    Cylinder Cyl3_frame_geom_2: radius=0.04 half_height=0.025
  PhysicalOffsetFrame Cyl4_frame: socket_parent=/bodyset/HAT translation=(0 0.389 0)
    Cylinder Cyl4_frame_geom_1: radius=0.005 half_height=0.389
  PhysicalOffsetFrame HAT_offset_frame: socket_parent=/bodyset/HAT translation=(0 0.2 0)
    Cylinder HAT_offset_frame_geom_1: radius=0.04 half_height=0.025
  DelpActuator [values shared by the 6 below unless stated]: min_control=-1 max_control=1 optimal_force=1
      activation_time_constant=0.011 dactivation_time_constant=0.068 default_activation=0 has_delp_curve=1
  DelpActuator ap: coordinate=q1 delp_curve_filename=src/delp1.txt qfac_dir=1 max_velocity=16 [rad/sec]
    force_length_curve: SimmSpline: x=(-1.92372 -1.89258 -1.8576 -1.80804 -1.75714 -1.68403 -1.60443 -1.52944 -1.44548 -1.33403 -1.24834 -1.15512 -1.05553 -0.96852 -0.880312 -0.770061 -0.69841 -0.655269 -0.614718)
        y=(257.791 289.892 315.341 347.459 374.738 397.801 406.952 403.39 384.708 346.687 307.432 261.527 206.551 163.667 121.993 82.7609 65.278 58.6613 57.4885)
  DelpActuator kp: coordinate=q2 delp_curve_filename=src/delp4.txt qfac_dir=1 max_velocity=18
    force_length_curve: SimmSpline: x=(0.00784305 0.0774185 0.146994 0.281408 0.422625 0.582255 0.716346 0.887262 1.08808 1.31401 1.47295 1.65941 1.88253 2.08944 2.28474 2.45233)
        y=(239.633 257.89 276.148 307.179 333.328 358.248 375.255 389.803 401.289 402.395 397.438 386.369 365.526 341.642 314.106 284.144)
  DelpActuator hp: coordinate=q3 delp_curve_filename=src/delp5.txt qfac_dir=1 max_velocity=20
    force_length_curve: SimmSpline: x=(-2.09654 -1.96398 -1.82257 -1.65685 -1.42702 -1.26567 -1.00264 -0.816956 -0.591471 -0.363777 -0.122793 0.0474366 0.171245)
        y=(583.832 582.934 578.443 571.257 554.192 535.329 500.299 472.455 434.731 397.006 350.299 318.862 294.611)
  DelpActuator am: coordinate=q1 delp_curve_filename=src/delp2.txt qfac_dir=-1 max_velocity=16
    force_length_curve: SimmSpline: x=(-1.91923 -1.86478 -1.8153 -1.76585 -1.69667 -1.63369 -1.5695 -1.48808 -1.38944 -1.31426 -1.24404 -1.15168 -1.06548 -0.950997 -0.829137 -0.755287 -0.691282 -0.648193 -0.608799)
        y=(30.6087 43.4783 54.4348 63.8261 74.9565 83.4783 90.7826 98.087 104.522 107.478 109.043 109.217 109.043 107.13 104.696 102.957 101.565 101.043 100.522)
  DelpActuator km: coordinate=q2 delp_curve_filename=src/delp3.txt qfac_dir=-1 max_velocity=18
    force_length_curve: SimmSpline: x=(-0.00922061 0.0668494 0.15214 0.251262 0.371129 0.484082 0.599339 0.721513 0.873653 1.0304 1.15719 1.30472 1.44994 1.64127 1.85795 2.05389 2.24752 2.44346)
        y=(266.528 304.896 347.1 391.214 434.672 468.528 494.056 513.814 528.425 532.785 528.843 517.198 500.432 468.258 426.457 381.471 339.688 292.14)
  DelpActuator hm: coordinate=q3 delp_curve_filename=src/delp6.txt qfac_dir=-1 max_velocity=20
    force_length_curve: SimmSpline: x=(-2.09521 -1.96552 -1.83367 -1.65126 -1.49078 -1.29067 -1.10148 -0.898967 -0.683136 -0.464901 -0.28396 -0.118341 0.018685 0.113803 0.171331)
        y=(44.551 66.8059 91.2162 123.882 150.443 179.873 203.915 222.565 236.543 239.742 232.528 219.208 201.941 185.399 174.611)
  Ground: meshes=checkered_floor.vtp
  BodySet:
    Body foot: mass=2.32 [kg] mass_center=(0 0.0943164 0) inertia=(0.1 0.1 0.00662 0 0 0)
      Sphere foot_geom_1: radius=0.04
    Body shank: mass=7.44 mass_center=(0 0.2317246 0) inertia=(0.1 0.1 0.1057 0 0 0)
      Sphere shank_geom_1: radius=0.04
    Body thigh: mass=16 mass_center=(0 0.2459432 0) inertia=(0.2 0.1 0.217584 0 0 0)
      Sphere thigh_geom_1: radius=0.04
    Body HAT: mass=54.24 mass_center=(0 0.3543 0) inertia=(1.1 1.1 1.48 0 0 0)
      Sphere HAT_geom_1: radius=0.04
    Body PulleyBody1: mass=0.001 mass_center=(0 0 0) inertia=(4e-6 4e-6 4e-6 0 0 0)
      WrapCylinder wrap1: quadrant=-y radius=0.05 length=0.05
    Body PulleyBody2: mass=0.001 mass_center=(0 0 0) inertia=(4e-6 4e-6 4e-6 0 0 0)
      WrapCylinder wrap2: quadrant=-x radius=0.05 length=0.05
    Body PulleyBody3: mass=0.001 mass_center=(0 0 0) inertia=(4e-6 4e-6 4e-6 0 0 0)
      WrapCylinder wrap3: quadrant=-x radius=0.05 length=0.05
  JointSet:
    PinJoint tip: socket_parent_frame=ground_offset socket_child_frame=foot_offset
      Coordinate q0: range=(0 1.570796)
      PhysicalOffsetFrame ground_offset: socket_parent=/ground translation=(0 0 0)
      PhysicalOffsetFrame foot_offset: socket_parent=/bodyset/foot translation=(0 0 0)
    PinJoint ankle: socket_parent_frame=foot_offset socket_child_frame=shank_offset
      Coordinate q1: range=(-1.923722 -0.6147181)
      PhysicalOffsetFrame foot_offset: socket_parent=/bodyset/foot translation=(0 0.2084 0)
      PhysicalOffsetFrame shank_offset: socket_parent=/bodyset/shank translation=(0 0 0)
    PinJoint knee: socket_parent_frame=shank_offset socket_child_frame=thigh_offset
      Coordinate q2: range=(0.007843048 2.45233)
      PhysicalOffsetFrame shank_offset: socket_parent=/bodyset/shank translation=(0 0.4182 0)
      PhysicalOffsetFrame thigh_offset: socket_parent=/bodyset/thigh translation=(0 0 0)
    PinJoint hip: socket_parent_frame=thigh_offset socket_child_frame=HAT_offset
      Coordinate q3: range=(-2.096538 0.1712455)
      PhysicalOffsetFrame thigh_offset: socket_parent=/bodyset/thigh translation=(0 0.4165 0)
      PhysicalOffsetFrame HAT_offset: socket_parent=/bodyset/HAT translation=(0 0 0)
    WeldJoint weld1: socket_parent_frame=thigh_offset socket_child_frame=PulleyBody1_offset
      PhysicalOffsetFrame thigh_offset: socket_parent=/bodyset/thigh translation=(0 0 0)
      PhysicalOffsetFrame PulleyBody1_offset: socket_parent=/bodyset/PulleyBody1 translation=(0 0 0)
    WeldJoint weld2: socket_parent_frame=HAT_offset socket_child_frame=PulleyBody2_offset
      PhysicalOffsetFrame HAT_offset: socket_parent=/bodyset/HAT translation=(0 0 0)
      PhysicalOffsetFrame PulleyBody2_offset: socket_parent=/bodyset/PulleyBody2 translation=(0 0 0)
    WeldJoint weld3: socket_parent_frame=shank_offset socket_child_frame=PulleyBody3_offset
      PhysicalOffsetFrame shank_offset: socket_parent=/bodyset/shank translation=(0 0 0)
      PhysicalOffsetFrame PulleyBody3_offset: socket_parent=/bodyset/PulleyBody3 translation=(0 0 0)
  ControllerSet:
    PrescribedController: actuator_list=(ap kp hp am km hm) interpolation_method=3
      FunctionSet ControlFunctions: Constant(value=0) Constant(value=0) Constant(value=0) Constant(value=0)
          Constant(value=0) Constant(value=0)
  ForceSet:
    PathSpring path_spring1: resting_length=0.4 [m] stiffness=1.781904 [N/m] dissipation=0.01 [s/m]
      PathPoint origin1: thigh (0.05 0.2 0)
      PathPoint insert1: shank (0.05 0.2182 0)
      PathWrap: wrap_object=wrap1 method=hybrid
    PathSpring path_spring2: resting_length=0.4 stiffness=17819.04 dissipation=0.01
      PathPoint origin2: HAT (-0.05 0.2 0)
      PathPoint insert2: thigh (-0.05 0.2165 0)
      PathWrap: wrap_object=wrap2 method=hybrid
    PathSpring path_spring3: resting_length=0.3 stiffness=17819.04 dissipation=0.01
      PathPoint origin3: shank (-0.05 0.2 0)
      PathPoint insert3: foot (-0.05 0.1084 0)
      PathWrap: wrap_object=wrap3 method=hybrid
