# OpenSim document version 40000
MocoStudy 4link:
  MocoProblem problem:
    MocoPhase phases:
      ModelProcessor model:
        model: Model 4linkModel:
          gravity: 0 -9.81 0
          credits: barak ostraich
          PhysicalOffsetFrame Cyl1_frame: socket_parent=/bodyset/foot translation=(0 0.1042 0) [meters]
            Cylinder Cyl1_frame_geom_1: radius=0.005 half_height=0.1042
            Cylinder Cyl1_frame_geom_2: radius=0.04 half_height=0.025
          PhysicalOffsetFrame Cyl2_frame: socket_parent=/bodyset/shank translation=(0 0.2091 0)
            Cylinder Cyl2_frame_geom_1: radius=0.005 half_height=0.2091
            Cylinder Cyl2_frame_geom_2: radius=0.04 half_height=0.025
          PhysicalOffsetFrame Cyl3_frame: socket_parent=/bodyset/thigh translation=(0 0.20825 0)
            Cylinder Cyl3_frame_geom_1: radius=0.005 half_height=0.20825
            Cylinder Cyl3_frame_geom_2: radius=0.04 half_height=0.025
          PhysicalOffsetFrame Cyl4_frame: socket_parent=/bodyset/HAT translation=(0 0.389 0)
            Cylinder Cyl4_frame_geom_1: radius=0.005 half_height=0.389
          PhysicalOffsetFrame HAT_offset_frame: socket_parent=/bodyset/HAT translation=(0 0.2 0)
            Cylinder HAT_offset_frame_geom_1: radius=0.04 half_height=0.025
          DelpActuator [values shared by the 6 below unless stated]: min_control=-1 max_control=1 optimal_force=1
              activation_time_constant=0.011 dactivation_time_constant=0.068 default_activation=0 has_delp_curve=1
          DelpActuator ap: coordinate=q1 delp_curve_filename=src/delp1.txt qfac_dir=1 max_velocity=16 [rad/sec]
          DelpActuator kp: coordinate=q2 delp_curve_filename=src/delp4.txt qfac_dir=1 max_velocity=18
          DelpActuator hp: coordinate=q3 delp_curve_filename=src/delp5.txt qfac_dir=1 max_velocity=20
          DelpActuator am: coordinate=q1 delp_curve_filename=src/delp2.txt qfac_dir=-1 max_velocity=16
          DelpActuator km: coordinate=q2 delp_curve_filename=src/delp3.txt qfac_dir=-1 max_velocity=18
          DelpActuator hm: coordinate=q3 delp_curve_filename=src/delp6.txt qfac_dir=-1 max_velocity=20
          Ground: meshes=checkered_floor.vtp
          BodySet:
            Body foot: mass=2.32 [kg] mass_center=(0 0.0943164 0) inertia=(0.1 0.1 0.00662 0 0 0)
              Sphere foot_geom_1: radius=0.04
            Body shank: mass=7.44 mass_center=(0 0.2317246 0) inertia=(0.1 0.1 0.1057 0 0 0)
              Sphere shank_geom_1: radius=0.04
            Body thigh: mass=16 mass_center=(0 0.2459432 0) inertia=(0.2 0.1 0.217584 0 0 0)
              Sphere thigh_geom_1: radius=0.04
            Body HAT: mass=54.24 mass_center=(0 0.3543 0) inertia=(1.1 1.1 1.48 0 0 0)
              Sphere HAT_geom_1: radius=0.04
            Body PulleyBody1: mass=0.001 mass_center=(0 0 0) inertia=(4e-6 4e-6 4e-6 0 0 0)
              WrapCylinder wrap1: quadrant=-y radius=0.05 length=0.05
            Body PulleyBody2: mass=0.001 mass_center=(0 0 0) inertia=(4e-6 4e-6 4e-6 0 0 0)
              WrapCylinder wrap2: quadrant=-x radius=0.05 length=0.05
            Body PulleyBody3: mass=0.001 mass_center=(0 0 0) inertia=(4e-6 4e-6 4e-6 0 0 0)
              WrapCylinder wrap3: quadrant=-x radius=0.05 length=0.05
          JointSet:
            PinJoint tip: socket_parent_frame=ground_offset socket_child_frame=foot_offset
              Coordinate q0: default_value=0.5235988 range=(0 3.141593)
              PhysicalOffsetFrame ground_offset: socket_parent=/ground translation=(0 0 0)
              PhysicalOffsetFrame foot_offset: socket_parent=/bodyset/foot translation=(0 0 0)
            PinJoint ankle: socket_parent_frame=foot_offset socket_child_frame=shank_offset
              Coordinate q1: default_value=-0.8726646 range=(-1.923722 -0.6147181)
              PhysicalOffsetFrame foot_offset: socket_parent=/bodyset/foot translation=(0 0.2084 0)
              PhysicalOffsetFrame shank_offset: socket_parent=/bodyset/shank translation=(0 0 0)
            PinJoint knee: socket_parent_frame=shank_offset socket_child_frame=thigh_offset
              Coordinate q2: default_value=0.3490659 range=(0.007843048 2.45233)
              PhysicalOffsetFrame shank_offset: socket_parent=/bodyset/shank translation=(0 0.4182 0)
              PhysicalOffsetFrame thigh_offset: socket_parent=/bodyset/thigh translation=(0 0 0)
            PinJoint hip: socket_parent_frame=thigh_offset socket_child_frame=HAT_offset
              Coordinate q3: default_value=-0.3490659 range=(-2.096538 0.1712455)
              PhysicalOffsetFrame thigh_offset: socket_parent=/bodyset/thigh translation=(0 0.4165 0)
              PhysicalOffsetFrame HAT_offset: socket_parent=/bodyset/HAT translation=(0 0 0)
            WeldJoint weld1: socket_parent_frame=thigh_offset socket_child_frame=PulleyBody1_offset
              PhysicalOffsetFrame thigh_offset: socket_parent=/bodyset/thigh translation=(0 0 0)
              PhysicalOffsetFrame PulleyBody1_offset: socket_parent=/bodyset/PulleyBody1 translation=(0 0 0)
            WeldJoint weld2: socket_parent_frame=HAT_offset socket_child_frame=PulleyBody2_offset
              PhysicalOffsetFrame HAT_offset: socket_parent=/bodyset/HAT translation=(0 0 0)
              PhysicalOffsetFrame PulleyBody2_offset: socket_parent=/bodyset/PulleyBody2 translation=(0 0 0)
            WeldJoint weld3: socket_parent_frame=shank_offset socket_child_frame=PulleyBody3_offset
              PhysicalOffsetFrame shank_offset: socket_parent=/bodyset/shank translation=(0 0 0)
              PhysicalOffsetFrame PulleyBody3_offset: socket_parent=/bodyset/PulleyBody3 translation=(0 0 0)
          ForceSet:
            PathSpring path_spring1: resting_length=0.4 [m] stiffness=0 [N/m] dissipation=0.01 [s/m]
              PathPoint origin1: thigh (0.05 0.2 0)
              PathPoint insert1: shank (0.05 0.2182 0)
              PathWrap: wrap_object=wrap1 method=hybrid
            PathSpring path_spring2: resting_length=0.4 stiffness=0 dissipation=0.01
              PathPoint origin2: HAT (-0.05 0.2 0)
              PathPoint insert2: thigh (-0.05 0.2165 0)
              PathWrap: wrap_object=wrap2 method=hybrid
            PathSpring path_spring3: resting_length=0.3 stiffness=0 dissipation=0.01
              PathPoint origin3: shank (-0.05 0.2 0)
              PathPoint insert3: foot (-0.05 0.1084 0)
              PathWrap: wrap_object=wrap3 method=hybrid
      MocoInitialBounds time_initial_bounds: bounds=0
      MocoFinalBounds time_final_bounds: bounds=(0.35 0.65)
      state_infos:
        MocoVariableInfo /jointset/tip/q0/value: bounds=(0.5235988 1.570796) initial_bounds=0.5235988
            final_bounds=(0.5235988 1.570796)
        MocoVariableInfo /jointset/ankle/q1/value: bounds=(-1.91923 -0.6087986) initial_bounds=-0.8726646
            final_bounds=(-1.91923 -0.6087986)
        MocoVariableInfo /jointset/knee/q2/value: bounds=(-0.009220607 2.443461) initial_bounds=0.3490659
            final_bounds=(-0.009220607 2.443461)
        MocoVariableInfo /jointset/hip/q3/value: bounds=(-2.095207 0.1713311) initial_bounds=-0.3490659
            final_bounds=(-2.095207 0.1713311)
        MocoVariableInfo /ap/activation: bounds=(0 1) initial_bounds=0 final_bounds=(0 1)
        MocoVariableInfo /kp/activation: bounds=(0 1) initial_bounds=0 final_bounds=(0 1)
        MocoVariableInfo /hp/activation: bounds=(0 1) initial_bounds=0 final_bounds=(0 1)
        MocoVariableInfo /am/activation: bounds=(-1 0) initial_bounds=0 final_bounds=(-1 0)
        MocoVariableInfo /km/activation: bounds=(-1 0) initial_bounds=0 final_bounds=(-1 0)
        MocoVariableInfo /hm/activation: bounds=(-1 0) initial_bounds=0 final_bounds=(-1 0)
      state_infos_pattern: MocoVariableInfo /jointset/.*/speed: bounds=(-55 55) initial_bounds=0
      control_infos:
        MocoVariableInfo /ap: bounds=(0 1)
        MocoVariableInfo /kp: bounds=(0 1)
        MocoVariableInfo /hp: bounds=(0 1)
        MocoVariableInfo /am: bounds=(-1 0)
        MocoVariableInfo /km: bounds=(-1 0)
        MocoVariableInfo /hm: bounds=(-1 0)
      parameters:
        MocoParameter knee stiffness: component_paths=/forceset/path_spring1 property_name=stiffness
          MocoBounds: bounds=(0 111350)
        MocoParameter hip stiffness: component_paths=/forceset/path_spring2 property_name=stiffness
          MocoBounds: bounds=(0 111350)
        MocoParameter ankle stiffness: component_paths=/forceset/path_spring3 property_name=stiffness
          MocoBounds: bounds=(0 111350)
      goals:
        MocoJumpGoal Jump
        MocoFinalTimeGoal Time: weight=0.5
  MocoCasADiSolver solver:
    num_mesh_intervals: 100
    optim_solver: ipopt
    optim_max_iterations: 9000
    optim_convergence_tolerance: 0.001
    optim_constraint_tolerance: 0.001
    parameters_require_initsystem: false
    optim_finite_difference_scheme: forward
