# OpenSim document version 40000
Model 4linkModel:
  gravity: 0 -9.81 0
  credits: barak ostraich
  PhysicalOffsetFrame Cyl1_frame: socket_parent=/bodyset/foot translation=(0 0.1042 0) [meters]
    Cylinder Cyl1_frame_geom_1: radius=0.005 half_height=0.1042
  PhysicalOffsetFrame Cyl2_frame: socket_parent=/bodyset/shank translation=(0 0.2091 0)
    Cylinder Cyl2_frame_geom_1: radius=0.005 half_height=0.2091
    Cylinder Cyl2_frame_geom_2: radius=0.05 half_height=0.025
  PhysicalOffsetFrame Cyl3_frame: socket_parent=/bodyset/thigh translation=(0 0.20825 0)
    Cylinder Cyl3_frame_geom_1: radius=0.005 half_height=0.20825
    Cylinder Cyl3_frame_geom_2: radius=0.05 half_height=0.025
  PhysicalOffsetFrame Cyl4_frame: socket_parent=/bodyset/HAT translation=(0 0.389 0)
    Cylinder Cyl4_frame_geom_1: radius=0.005 half_height=0.389
  ActivationCoordinateActuator [values shared by the 6 below unless stated]: min_control=-1 max_control=1
      activation_time_constant=0.011 dactivation_time_constant=0.068 default_activation=0
  ActivationCoordinateActuator ap: coordinate=q1 optimal_force=0
  ActivationCoordinateActuator kp: coordinate=q2 optimal_force=557.6441
  ActivationCoordinateActuator hp: coordinate=q3 optimal_force=0
  ActivationCoordinateActuator am: coordinate=q1 optimal_force=153.05
  ActivationCoordinateActuator km: coordinate=q2 optimal_force=0
  ActivationCoordinateActuator hm: coordinate=q3 optimal_force=334.1675
  Ground: meshes=checkered_floor.vtp
  BodySet:
    Body foot: mass=2.32 [kg] mass_center=(0 0.0943164 0) inertia=(0.1 0.1 0.00662 0 0 0)
      Sphere foot_geom_1: radius=0.04
    Body shank: mass=7.44 mass_center=(0 0.2317246 0) inertia=(0.1 0.1 0.1057 0 0 0)
      Sphere shank_geom_1: radius=0.04
    Body thigh: mass=16 mass_center=(0 0.2459432 0) inertia=(0.2 0.1 0.217584 0 0 0)
      Sphere thigh_geom_1: radius=0.04
    Body HAT: mass=54.24 mass_center=(0 0.3543 0) inertia=(1.1 1.1 1.48 0 0 0)
      Sphere HAT_geom_1: radius=0.04
    Body PulleyBody: mass=0.001 mass_center=(0 0 0) inertia=(6.666667e-6 6.666667e-6 6.666667e-6 0 0 0)
      WrapCylinder: quadrant=-y radius=0.05 length=0.05
  JointSet:
    PinJoint tip: socket_parent_frame=ground_offset socket_child_frame=foot_offset
      Coordinate q0: range=(0 1.570796)
      PhysicalOffsetFrame ground_offset: socket_parent=/ground translation=(0 0 0)
      PhysicalOffsetFrame foot_offset: socket_parent=/bodyset/foot translation=(0 0 0)
    PinJoint ankle: socket_parent_frame=foot_offset socket_child_frame=shank_offset
      Coordinate q1: range=(-1.923722 -0.6147181)
      PhysicalOffsetFrame foot_offset: socket_parent=/bodyset/foot translation=(0 0.2084 0)
      PhysicalOffsetFrame shank_offset: socket_parent=/bodyset/shank translation=(0 0 0)
    PinJoint knee: socket_parent_frame=shank_offset socket_child_frame=thigh_offset
      Coordinate q2: range=(0 2.443461)
      PhysicalOffsetFrame shank_offset: socket_parent=/bodyset/shank translation=(0 0.4182 0)
      PhysicalOffsetFrame thigh_offset: socket_parent=/bodyset/thigh translation=(0 0 0)
    PinJoint hip: socket_parent_frame=thigh_offset socket_child_frame=HAT_offset
      Coordinate q3: range=(-2.096538 0.1712454)
      PhysicalOffsetFrame thigh_offset: socket_parent=/bodyset/thigh translation=(0 0.4165 0)
      PhysicalOffsetFrame HAT_offset: socket_parent=/bodyset/HAT translation=(0 0 0)
    WeldJoint weld: socket_parent_frame=thigh_offset socket_child_frame=PulleyBody_offset
      PhysicalOffsetFrame thigh_offset: socket_parent=/bodyset/thigh translation=(0 0 0)
      PhysicalOffsetFrame PulleyBody_offset: socket_parent=/bodyset/PulleyBody translation=(0 0 0)
  ControllerSet:
    PrescribedController: actuator_list=(ap kp hp am km hm) interpolation_method=3
      FunctionSet ControlFunctions:
        PiecewiseLinearFunction [values shared by the 6 below unless stated]: x=(0 2.02078e-6 4.04157e-6 6.06235e-6 8.08314e-6 1.81871e-5 2.8291e-5 3.83949e-5 4.84988e-5 9.90184e-5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)
        PiecewiseLinearFunction: y=(0 0 0 0 0 0 0 0 0 0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)
        PiecewiseLinearFunction: y=(0.0834259 0.0834259 0.0834259 0.0834259 0.0834259 0.0834259 0.0834258 0.0834258 0.0834258 0.0834254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)
        PiecewiseLinearFunction: y=(0.101547 0.10155 0.101553 0.101556 0.101559 0.101573 0.101588 0.101602 0.101617 0.101691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)
        PiecewiseLinearFunction: y=(-0.344737 -0.344631 -0.344525 -0.344419 -0.344313 -0.343782 -0.343251 -0.342721 -0.34219 -0.339537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)
        PiecewiseLinearFunction: y=(0 0 0 0 0 0 0 0 0 0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)
        PiecewiseLinearFunction: y=(0 0 0 0 0 0 0 0 0 0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)
  ForceSet:
    PathSpring path_spring: resting_length=0.4 [m] stiffness=17819.04 [N/m] dissipation=0.01 [s/m]
      PathPoint origin: thigh (0.05 0.2 0)
      PathPoint insert: shank (0.05 0.2182 0)
      PathWrap: wrap_object=wrapcylinder method=hybrid
